// SBML level 3 version 1

model Model_generated_by_BIOCHAM()

  // Compartments:
  compartment compartment1 = 1;
  compartment compartment2 = 1;

  // Species:
  species SH1 in compartment1 = 4000;
  species IH1 in compartment1 = 20;
  species RH1 in compartment1 = 20;
  species D_SH1 in compartment1 = 0;
  species D_IH1 in compartment1 = 0;
  species D_RH1 in compartment1 = 0;
  species SM1 in compartment1 = 2000;
  species IM1 in compartment1 = 10;
  species D_SM1 in compartment1 = 0;
  species D_IM1 in compartment1 = 0;
  species SH2 in compartment2 = 4000;
  species IH2 in compartment2 = 20;
  species RH2 in compartment2 = 20;
  species D_SH2 in compartment2 = 0;
  species D_IH2 in compartment2 = 0;
  species D_RH2 in compartment2 = 0;
  species SM2 in compartment2 = 2000;
  species IM2 in compartment2 = 10;
  species D_SM2 in compartment2 = 0;
  species D_IM2 in compartment2 = 0;

  // Parameters:
  sigma = 0.1;
  muH = 0.01;
  betaMH_1_1 = 0.3;
  betaHM_1_1 = 0.4;
  muM_1 = 0.02;
  theta_SH_12 = 0.0003506062;
  theta_IH_12 = 0.0003499927;
  theta_RH_12 = 0.0003493813;
  alpha_SM_12 = 0.0003512219;
  alpha_IM_12 = 0.0003515924;
  betaMH_1_2 = 0.2;
  betaHM_1_2 = 0.25;
  betaMH_2_2 = 0.3;
  betaHM_2_2 = 0.4;
  muM_2 = 0.02;
  theta_SH_21 = 0.0003506062;
  theta_IH_21 = 0.0003499927;
  theta_RH_21 = 0.0003493813;
  alpha_SM_21 = 0.0003512219;
  alpha_IM_21 = 0.0003515924;
  betaMH_2_1 = 0.2;
  betaHM_2_1 = 0.25;

  // Initial assignments:
  S1 = S0;
  I1 = I0;
  R1 = R0;
  S2 = S0;
  I2 = I0;
  R2 = R0;

  // Reactions:
  IH_1_RH: IH1 => RH1; MassAction(sigma);
  SM_1_IH: SM1 + IH1 => IM1 + IH1; MassAction(betaMH_1_1);
  RH_1: RH1 => D_RH1; MassAction(muH);
  SH_1: SH1 => D_SH1; MassAction(muH);
  IH_1: IH1 => D_IH1; MassAction(muH);
  SH_1_IM: SH1 + IM1 => IH1 + IM1; MassAction(betaHM_1_1);
  SM_1: SM1 => D_SM1; MassAction(muM_1);
  IM_1: IM1 => D_IM1; MassAction(muM_1);
  SH_1_2_SH: SH1 => SH2; MassAction(theta_SH_12);
  IH_1_2_IH: IH1 => IH2; MassAction(theta_IH_12);
  RH_1_2_RH: RH1 => RH2; MassAction(theta_RH_12);
  SM_1_2_SM: SM1 => SM2; MassAction(alpha_SM_12);
  IM_1_2_IM: IM1 => IM2; MassAction(alpha_IM_12);
  SM_1_2_IH: SM1 + IH2 => IM1 + IH2; MassAction(betaMH_1_2);
  SH_1_2_IM: SH1 + IM2 => IH1 + IM2; MassAction(betaHM_1_2);
  IH_2_RH: IH2 => RH2; MassAction(sigma);
  SM_2_IH: SM2 + IH2 => IM2 + IH2; MassAction(betaMH_2_2);
  RH_2: RH2 => D_RH2; MassAction(muH);
  SH_2: SH2 => D_SH2; MassAction(muH);
  IH_2: IH2 => D_IH2; MassAction(muH);
  SH_2_IM: SH2 + IM2 => IH2 + IM2; MassAction(betaHM_2_2);
  SM_2: SM2 => D_SM2; MassAction(muM_2);
  IM_2: IM2 => D_IM2; MassAction(muM_2);
  SH_2_1_SH: SH2 => SH1; MassAction(theta_SH_21);
  IH_2_1_IH: IH2 => IH1; MassAction(theta_IH_21);
  RH_2_1_RH: RH2 => RH1; MassAction(theta_RH_21);
  SM_2_1_SM: SM2 => SM1; MassAction(alpha_SM_21);
  IM_2_1_IM: IM2 => IM1; MassAction(alpha_IM_21);
  SM_2_1_IH: SM2 + IH1 => IM2 + IH1; MassAction(betaMH_2_1);
  SH_2_1_IM: SH2 + IM1 => IH2 + IM1; MassAction(betaHM_2_1);
end
